Mon 06 Feb 2023 02:32:47 PM CET
$PROBLEM //like/2001//but/1 cmt, diag. omega, prop. err.//
$INPUT C ID TIME SEQ=DROP EVID AMT DV SUBJ HOUR HEIGHT WT SEX AGE DOSE FED
$DATA ../../data/derived/drug.csv IGNORE=C
$SUBROUTINE ADVAN2 TRANS2
$PK
 CL=THETA(1)*EXP(ETA(1))
 V =THETA(2)*EXP(ETA(2))
 KA=THETA(3)*EXP(ETA(3))
 S2=V

$ERROR
 Y=F*(1+ERR(1))
 IPRE=F

$THETA
(0,10,50)                       ; CL/F     ; clearance                                     ; L/h
(0,10,100)                      ; Vc/F     ; central volume                                ; L
(0,0.2,5)                       ; Ka       ; absorption rate constant                      ; 1/h

$OMEGA
0.1                             ; IIV_CL   ; interindividual variability on clearance
0.1                             ; IIV_Vc   ; interindividual variability on central volume
0.1                             ; IIV_Ka   ; interindividual variability on Ka

$SIGMA
0.1                             ; ERR_PROP ; proportional error

$ESTIMATION MAXEVAL=9999 PRINT=5 NOABORT METHOD=1 INTER MSFO=mod.msf
$COV PRINT=E
$TABLE NOPRINT FILE=mod.tab ONEHEADER
ID                              ; ID       ; NONMEM subject identifier
AMT                             ; AMT      ; dose amount                                   ; mg
TIME                            ; TIME     ; time                                          ; h
EVID                            ; EVID     ; event type                                    ; //0/observation//1/dose
PRED                            ; PRED     ; population prediction                         ; ng/mL
IPRE                            ; IPRED    ; individual prediction                         ; ng/mL
CWRESI                          ; CWRESI   ; conditional weighted residual
CIWRESI                         ; CIWRESI  ; conditional indvividual weighted residual

$TABLE NOPRINT FILE=mod2.tab ONEHEADER
ID                              ; ID       ; NONMEM subject identifier
TIME                            ; TIME     ; time                                          ; h
CL                              ; CLI      ; posthoc systemic clearance                    ; L/h
V                               ; V2I      ; posthoc systemic volume                       ; L
KA                              ; KAI      ; posthoc absorption rate                       ; 1/h
ETA1                            ; BSV_CL   ; clearance between-subject variability
ETA2                            ; BSV_V2   ; volume between-subject variability
ETA3                            ; BSV_KA   ; absorption between-subject variability

NM-TRAN MESSAGES
 WARNINGS AND ERRORS (IF ANY) FOR PROBLEM    1
 (WARNING  2) NM-TRAN INFERS THAT THE DATA ARE POPULATION.

1NONLINEAR MIXED EFFECTS MODEL PROGRAM (NONMEM) VERSION 7.4.3
 ORIGINALLY DEVELOPED BY STUART BEAL, LEWIS SHEINER, AND ALISON BOECKMANN
 CURRENT DEVELOPERS ARE ROBERT BAUER, ICON DEVELOPMENT SOLUTIONS,
 AND ALISON BOECKMANN. IMPLEMENTATION, EFFICIENCY, AND STANDARDIZATION
 PERFORMED BY NOUS INFOSYSTEMS.
 PROBLEM NO.:         1
 //like/2001//but/1 cmt, diag. omega, prop. err.//
 TOT. NO. OF OBS RECS:      510
 TOT. NO. OF INDIVIDUALS:       40
 ONE COMPARTMENT MODEL WITH FIRST-ORDER ABSORPTION (ADVAN2)
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 #TBLN:      1
 #METH: First Order Conditional Estimation with Interaction
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
 #TERM:
0MINIMIZATION SUCCESSFUL
 NO. OF FUNCTION EVALUATIONS USED:      171
 NO. OF SIG. DIGITS IN FINAL EST.:  3.2

 ETABAR IS THE ARITHMETIC MEAN OF THE ETA-ESTIMATES,
 AND THE P-VALUE IS GIVEN FOR THE NULL HYPOTHESIS THAT THE TRUE MEAN IS 0.

 ETABAR:         8.9838E-05  1.2106E-02  6.6160E-03
 SE:             7.7971E-02  6.4680E-02  3.7617E-02
 N:                      40          40          40

 P VAL.:         9.9908E-01  8.5153E-01  8.6039E-01

 ETASHRINKSD(%)  2.3423E-01  9.2591E+00  5.7284E+00
 ETASHRINKVR(%)  4.6790E-01  1.7661E+01  1.1129E+01
 EBVSHRINKSD(%)  1.5179E+00  1.0683E+01  6.5779E+00
 EBVSHRINKVR(%)  3.0128E+00  2.0224E+01  1.2723E+01
 EPSSHRINKSD(%)  9.4851E+00
 EPSSHRINKVR(%)  1.8070E+01


 TOTAL DATA POINTS NORMALLY DISTRIBUTED (N):          510
 N*LOG(2PI) CONSTANT TO OBJECTIVE FUNCTION:    937.31730386876609
 OBJECTIVE FUNCTION VALUE WITHOUT CONSTANT:    2570.4742303989719
 OBJECTIVE FUNCTION VALUE WITH CONSTANT:       3507.7915342677379
 REPORTED OBJECTIVE FUNCTION DOES NOT CONTAIN CONSTANT

 TOTAL EFFECTIVE ETAS (NIND*NETA):                           120


 #TERE:
 Elapsed estimation  time in seconds:     0.75
 Elapsed covariance  time in seconds:     0.54
 Elapsed postprocess time in seconds:     0.02

 ********************               FIRST ORDER CONDITIONAL ESTIMATION WITH INTERACTION              ********************
 #OBJT:**************                       MINIMUM VALUE OF OBJECTIVE FUNCTION                      ********************
 #OBJV:********************************************     2570.474       **************************************************

 ********************               FIRST ORDER CONDITIONAL ESTIMATION WITH INTERACTION              ********************
 ********************                             FINAL PARAMETER ESTIMATE                           ********************

 THETA - VECTOR OF FIXED EFFECTS PARAMETERS   *********
         TH 1      TH 2      TH 3
         1.11E+01  1.32E+01  4.36E-02

 OMEGA - COV MATRIX FOR RANDOM EFFECTS - ETAS  ********
         ETA1      ETA2      ETA3
 ETA1
+        2.51E-01
 ETA2
+        0.00E+00  2.08E-01
 ETA3
+        0.00E+00  0.00E+00  6.53E-02

 SIGMA - COV MATRIX FOR RANDOM EFFECTS - EPSILONS  ****
         EPS1
 EPS1
+        7.51E-02

 OMEGA - CORR MATRIX FOR RANDOM EFFECTS - ETAS  *******
         ETA1      ETA2      ETA3
 ETA1
+        5.01E-01
 ETA2
+        0.00E+00  4.57E-01
 ETA3
+        0.00E+00  0.00E+00  2.56E-01

 SIGMA - CORR MATRIX FOR RANDOM EFFECTS - EPSILONS  ***
         EPS1
 EPS1
+        2.74E-01

 ********************               FIRST ORDER CONDITIONAL ESTIMATION WITH INTERACTION              ********************
 ********************                            STANDARD ERROR OF ESTIMATE                          ********************

 THETA - VECTOR OF FIXED EFFECTS PARAMETERS   *********
         TH 1      TH 2      TH 3
         9.03E-01  1.10E+00  2.00E-03

 OMEGA - COV MATRIX FOR RANDOM EFFECTS - ETAS  ********
         ETA1      ETA2      ETA3
 ETA1
+        4.84E-02
 ETA2
+       .........  4.29E-02
 ETA3
+       ......... .........  1.90E-02

 SIGMA - COV MATRIX FOR RANDOM EFFECTS - EPSILONS  ****
         EPS1
 EPS1
+        7.71E-03

 OMEGA - CORR MATRIX FOR RANDOM EFFECTS - ETAS  *******
         ETA1      ETA2      ETA3
 ETA1
+        4.83E-02
 ETA2
+       .........  4.70E-02
 ETA3
+       ......... .........  3.73E-02

 SIGMA - CORR MATRIX FOR RANDOM EFFECTS - EPSILONS  ***
         EPS1
 EPS1
+        1.41E-02

 ********************               FIRST ORDER CONDITIONAL ESTIMATION WITH INTERACTION              ********************
 ********************                          COVARIANCE MATRIX OF ESTIMATE                         ********************

            TH 1      TH 2      TH 3      OM11      OM12      OM13      OM22      OM23      OM33      SG11
 TH 1
+        8.16E-01
 TH 2
+        7.82E-01  1.21E+00
 TH 3
+        6.55E-04  8.56E-04  4.02E-06
 OM11
+        1.54E-02  1.55E-02  1.34E-05  2.34E-03
 OM12
+       ......... ......... ......... ......... .........
 OM13
+       ......... ......... ......... ......... ......... .........
 OM22
+        1.14E-02  1.17E-02  9.37E-07  1.14E-03 ......... .........  1.84E-03
 OM23
+       ......... ......... ......... ......... ......... ......... ......... .........
 OM33
+       -3.56E-03 -7.18E-03 -2.49E-05 -1.17E-04 ......... ......... -6.27E-05 .........  3.63E-04
 SG11
+        8.47E-04 -2.54E-03 -6.16E-06 -9.34E-05 ......... ......... -2.12E-05 .........  4.77E-05  5.94E-05

 ********************               FIRST ORDER CONDITIONAL ESTIMATION WITH INTERACTION              ********************
 ********************                          CORRELATION MATRIX OF ESTIMATE                        ********************

            TH 1      TH 2      TH 3      OM11      OM12      OM13      OM22      OM23      OM33      SG11
 TH 1
+        9.03E-01
 TH 2
+        7.87E-01  1.10E+00
 TH 3
+        3.62E-01  3.89E-01  2.00E-03
 OM11
+        3.52E-01  2.92E-01  1.38E-01  4.84E-02
 OM12
+       ......... ......... ......... ......... .........
 OM13
+       ......... ......... ......... ......... ......... .........
 OM22
+        2.94E-01  2.48E-01  1.09E-02  5.49E-01 ......... .........  4.29E-02
 OM23
+       ......... ......... ......... ......... ......... ......... ......... .........
 OM33
+       -2.07E-01 -3.43E-01 -6.52E-01 -1.27E-01 ......... ......... -7.67E-02 .........  1.90E-02
 SG11
+        1.22E-01 -3.00E-01 -3.99E-01 -2.50E-01 ......... ......... -6.41E-02 .........  3.25E-01  7.71E-03
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
 ********************               FIRST ORDER CONDITIONAL ESTIMATION WITH INTERACTION              ********************
 ********************                      EIGENVALUES OF COR MATRIX OF ESTIMATE                     ********************

             1         2         3         4         5         6         7
         7.00E-02  3.36E-01  4.45E-01  6.89E-01  1.14E+00  1.52E+00  2.80E+00
 Elapsed finaloutput time in seconds:     0.02
 #CPUT: Total CPU Time in Seconds,        1.345
