Mon 06 Feb 2023 02:51:44 PM CET
$PROBLEM //like/2006//but/full block omega//
$INPUT C ID TIME SEQ=DROP EVID AMT DV SUBJ HOUR HEIGHT WT SEX AGE DOSE FED
$DATA ../../data/derived/drug.csv IGNORE=C
$SUBROUTINE ADVAN4 TRANS4
$PK
 CL=THETA(1)*EXP(ETA(1)) * (WT/70)**THETA(6) * THETA(7)**SEX
 V2 =THETA(2)*EXP(ETA(2))
 KA=THETA(3)*EXP(ETA(3))
 Q  =THETA(4)
 V3=THETA(5)
 S2=V2

$ERROR
 Y=F*(1+ERR(1)) + ERR(2)
 IPRE=F

$THETA
(0,10,50)                       ; CL/F     ; clearance                                     ; L/h
(0,10,100)                      ; Vc/F     ; central volume                                ; L
(0,0.2,5)                       ; Ka       ; absorption rate constant                      ; 1/h
(0,10,50)                       ; Q/F      ; intercompartmental clearance                  ; L/h
(0,100,1000)                    ; Vp/F     ; peripheral volume                             ; L
(0,0.75,3)                      ; WT_CL    ; weight effect on clearance
(0,1,2)                         ; MALE_CL  ; male effect on clearance

$OMEGA BLOCK(3)
0.1                             ; IIV_CL   ; interindividual variability on clearance
0.01                            ; CL_V     ; interindividual clearance-volume covariance
0.1                             ; IIV_Vc   ; interindividual variability on central volume
0.01                            ; CL_Ka    ; interindividual clearance-Ka covariance
0.01                            ; Vc_Ka    ; interindividual volume-Ka covariance
0.1                             ; IIV_Ka   ; interindividual variability on Ka

$SIGMA
0.1                             ; ERR_PROP ; proportional error
0.1                             ; ERR_ADD  ; additive error

$ESTIMATION MAXEVAL=9999 PRINT=5 NOABORT METHOD=1 INTER MSFO=mod.msf
$COV PRINT=E
$TABLE NOPRINT FILE=mod.tab ONEHEADER
ID                              ; ID       ; NONMEM subject identifier
AMT                             ; AMT      ; dose amount                                   ; mg
TIME                            ; TIME     ; time                                          ; h
EVID                            ; EVID     ; event type                                    ; //0/observation//1/dose
PRED                            ; PRED     ; population prediction                         ; ng/mL
IPRE                            ; IPRED    ; individual prediction                         ; ng/mL
CWRESI                          ; CWRESI   ; conditional weighted residual
CIWRESI                         ; CIWRESI  ; conditional indvividual weighted residual

$TABLE NOPRINT FILE=mod2.tab ONEHEADER
ID                              ; ID       ; NONMEM subject identifier
TIME                            ; TIME     ; time                                          ; h
CL                              ; CLI      ; posthoc systemic clearance                    ; L/h
V2                              ; V2I      ; posthoc systemic volume                       ; L
KA                              ; KAI      ; posthoc absorption rate                       ; 1/h
Q                               ; Q2I      ; posthoc intercompartmental clearance          ; 1/h
V3                              ; V3I      ; posthoc peripheral volume                     ; L
ETA1                            ; BSV_CL   ; clearance between-subject variability
ETA2                            ; BSV_V2   ; volume between-subject variability
ETA3                            ; BSV_KA   ; absorption between-subject variability

NM-TRAN MESSAGES
 WARNINGS AND ERRORS (IF ANY) FOR PROBLEM    1
 (WARNING  2) NM-TRAN INFERS THAT THE DATA ARE POPULATION.

1NONLINEAR MIXED EFFECTS MODEL PROGRAM (NONMEM) VERSION 7.4.3
 ORIGINALLY DEVELOPED BY STUART BEAL, LEWIS SHEINER, AND ALISON BOECKMANN
 CURRENT DEVELOPERS ARE ROBERT BAUER, ICON DEVELOPMENT SOLUTIONS,
 AND ALISON BOECKMANN. IMPLEMENTATION, EFFICIENCY, AND STANDARDIZATION
 PERFORMED BY NOUS INFOSYSTEMS.
 PROBLEM NO.:         1
 //like/2006//but/full block omega//
 TOT. NO. OF OBS RECS:      510
 TOT. NO. OF INDIVIDUALS:       40
 TWO COMPARTMENT MODEL WITH FIRST-ORDER ABSORPTION (ADVAN4)
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 #TBLN:      1
 #METH: First Order Conditional Estimation with Interaction
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
 #TERM:
0MINIMIZATION SUCCESSFUL
 NO. OF FUNCTION EVALUATIONS USED:      556
 NO. OF SIG. DIGITS IN FINAL EST.:  3.2

 ETABAR IS THE ARITHMETIC MEAN OF THE ETA-ESTIMATES,
 AND THE P-VALUE IS GIVEN FOR THE NULL HYPOTHESIS THAT THE TRUE MEAN IS 0.

 ETABAR:        -6.6416E-04 -5.7143E-04  1.0213E-03
 SE:             7.1313E-02  4.6965E-02  3.1648E-02
 N:                      40          40          40

 P VAL.:         9.9257E-01  9.9029E-01  9.7426E-01

 ETASHRINKSD(%)  1.2271E+00  2.1593E+00  6.0598E+00
 ETASHRINKVR(%)  2.4392E+00  4.2721E+00  1.1752E+01
 EBVSHRINKSD(%)  2.2417E+00  3.2083E+00  7.1357E+00
 EBVSHRINKVR(%)  4.4331E+00  6.3137E+00  1.3762E+01
 EPSSHRINKSD(%)  7.0503E+00  7.0503E+00
 EPSSHRINKVR(%)  1.3604E+01  1.3604E+01


 TOTAL DATA POINTS NORMALLY DISTRIBUTED (N):          510
 N*LOG(2PI) CONSTANT TO OBJECTIVE FUNCTION:    937.31730386876609
 OBJECTIVE FUNCTION VALUE WITHOUT CONSTANT:    2405.9162579349149
 OBJECTIVE FUNCTION VALUE WITH CONSTANT:       3343.2335618036809
 REPORTED OBJECTIVE FUNCTION DOES NOT CONTAIN CONSTANT

 TOTAL EFFECTIVE ETAS (NIND*NETA):                           120


 #TERE:
 Elapsed estimation  time in seconds:     2.12
 Elapsed covariance  time in seconds:     2.40
 Elapsed postprocess time in seconds:     0.02

 ********************               FIRST ORDER CONDITIONAL ESTIMATION WITH INTERACTION              ********************
 #OBJT:**************                       MINIMUM VALUE OF OBJECTIVE FUNCTION                      ********************
 #OBJV:********************************************     2405.916       **************************************************

 ********************               FIRST ORDER CONDITIONAL ESTIMATION WITH INTERACTION              ********************
 ********************                             FINAL PARAMETER ESTIMATE                           ********************

 THETA - VECTOR OF FIXED EFFECTS PARAMETERS   *********
         TH 1      TH 2      TH 3      TH 4      TH 5      TH 6      TH 7
         9.51E+00  2.28E+01  7.14E-02  3.47E+00  1.13E+02  1.19E+00  1.02E+00

 OMEGA - COV MATRIX FOR RANDOM EFFECTS - ETAS  ********
         ETA1      ETA2      ETA3
 ETA1
+        2.14E-01
 ETA2
+        1.21E-01  9.45E-02
 ETA3
+       -1.16E-02 -3.72E-02  4.66E-02

 SIGMA - COV MATRIX FOR RANDOM EFFECTS - EPSILONS  ****
         EPS1      EPS2
 EPS1
+        4.92E-02
 EPS2
+        0.00E+00  2.02E-01

 OMEGA - CORR MATRIX FOR RANDOM EFFECTS - ETAS  *******
         ETA1      ETA2      ETA3
 ETA1
+        4.62E-01
 ETA2
+        8.49E-01  3.07E-01
 ETA3
+       -1.16E-01 -5.61E-01  2.16E-01

 SIGMA - CORR MATRIX FOR RANDOM EFFECTS - EPSILONS  ***
         EPS1      EPS2
 EPS1
+        2.22E-01
 EPS2
+        0.00E+00  4.49E-01

 ********************               FIRST ORDER CONDITIONAL ESTIMATION WITH INTERACTION              ********************
 ********************                            STANDARD ERROR OF ESTIMATE                          ********************

 THETA - VECTOR OF FIXED EFFECTS PARAMETERS   *********
         TH 1      TH 2      TH 3      TH 4      TH 5      TH 6      TH 7
         9.20E-01  2.18E+00  5.25E-03  5.36E-01  2.37E+01  3.37E-01  1.12E-01

 OMEGA - COV MATRIX FOR RANDOM EFFECTS - ETAS  ********
         ETA1      ETA2      ETA3
 ETA1
+        4.89E-02
 ETA2
+        3.19E-02  3.13E-02
 ETA3
+        2.01E-02  1.34E-02  1.62E-02

 SIGMA - COV MATRIX FOR RANDOM EFFECTS - EPSILONS  ****
         EPS1      EPS2
 EPS1
+        5.38E-03
 EPS2
+       .........  6.76E-02

 OMEGA - CORR MATRIX FOR RANDOM EFFECTS - ETAS  *******
         ETA1      ETA2      ETA3
 ETA1
+        5.28E-02
 ETA2
+        1.03E-01  5.10E-02
 ETA3
+        1.97E-01  2.32E-01  3.75E-02

 SIGMA - CORR MATRIX FOR RANDOM EFFECTS - EPSILONS  ***
         EPS1      EPS2
 EPS1
+        1.21E-02
 EPS2
+       .........  7.53E-02

 ********************               FIRST ORDER CONDITIONAL ESTIMATION WITH INTERACTION              ********************
 ********************                          COVARIANCE MATRIX OF ESTIMATE                         ********************

            TH 1      TH 2      TH 3      TH 4      TH 5      TH 6      TH 7      OM11      OM12      OM13      OM22      OM23
             OM33      SG11      SG12      SG22
 TH 1
+        8.46E-01
 TH 2
+        7.73E-01  4.73E+00
 TH 3
+        1.02E-03  6.66E-03  2.76E-05
 TH 4
+        6.01E-02  8.95E-01  2.22E-03  2.87E-01
 TH 5
+       -1.51E+00  5.36E+00 -3.03E-02  2.09E-01  5.63E+02
 TH 6
+       -1.75E-01  7.18E-02 -1.30E-04  1.63E-02 -6.60E-01  1.14E-01
 TH 7
+       -3.90E-02 -2.44E-02 -1.02E-04 -1.04E-02  7.50E-01  2.71E-04  1.26E-02
 OM11
+        6.15E-03  5.59E-03  2.91E-06  4.27E-03  2.75E-01 -7.07E-03  1.64E-03  2.39E-03
 OM12
+       -2.09E-04 -2.20E-02 -6.53E-05 -6.23E-03  1.61E-01 -3.02E-03  3.07E-04  7.82E-04  1.02E-03
 OM13
+       -5.33E-03 -1.95E-02 -6.74E-05 -4.54E-03 -6.31E-03  2.48E-03 -5.36E-04 -1.39E-04  1.35E-04  4.03E-04
 OM22
+       -4.24E-03 -2.44E-02 -7.81E-05 -7.79E-03  2.67E-02 -7.76E-06  5.86E-04  2.62E-04  8.20E-04  2.10E-04  9.82E-04
 OM23
+       -2.55E-03 -1.12E-02 -2.75E-05 -2.25E-03  7.42E-02 -3.20E-04 -5.59E-05  1.52E-04  1.70E-04  1.60E-04  7.11E-05  1.80E-04
 OM33
+       -3.37E-03  4.80E-03  2.83E-05  3.08E-03 -3.40E-02  8.78E-05 -3.31E-04 -5.84E-05 -1.60E-04 -4.88E-05 -1.96E-04 -2.43E-05
          2.62E-04
 SG11
+       -5.02E-04 -3.11E-03 -1.02E-05 -6.26E-04  4.55E-02  1.14E-04  1.18E-04 -2.09E-05 -9.72E-06  5.04E-06 -2.61E-06 -3.29E-06
         -1.66E-05  2.90E-05
 SG12
+       ......... ......... ......... ......... ......... ......... ......... ......... ......... ......... ......... .........
         ......... ......... .........
 SG22
+        2.05E-02  1.89E-02  5.88E-05  2.50E-03 -4.26E-01 -5.02E-03 -1.04E-03  3.08E-04  2.69E-04 -1.63E-04  9.25E-05  3.98E-05
         -1.76E-04 -1.85E-04 .........  4.57E-03

 ********************               FIRST ORDER CONDITIONAL ESTIMATION WITH INTERACTION              ********************
 ********************                          CORRELATION MATRIX OF ESTIMATE                        ********************

            TH 1      TH 2      TH 3      TH 4      TH 5      TH 6      TH 7      OM11      OM12      OM13      OM22      OM23
             OM33      SG11      SG12      SG22
 TH 1
+        9.20E-01
 TH 2
+        3.86E-01  2.18E+00
 TH 3
+        2.12E-01  5.84E-01  5.25E-03
 TH 4
+        1.22E-01  7.68E-01  7.89E-01  5.36E-01
 TH 5
+       -6.92E-02  1.04E-01 -2.43E-01  1.64E-02  2.37E+01
 TH 6
+       -5.63E-01  9.79E-02 -7.33E-02  9.00E-02 -8.25E-02  3.37E-01
 TH 7
+       -3.77E-01 -9.98E-02 -1.74E-01 -1.73E-01  2.81E-01  7.16E-03  1.12E-01
 OM11
+        1.37E-01  5.26E-02  1.14E-02  1.63E-01  2.37E-01 -4.29E-01  2.99E-01  4.89E-02
 OM12
+       -7.10E-03 -3.18E-01 -3.89E-01 -3.64E-01  2.13E-01 -2.81E-01  8.54E-02  5.01E-01  3.19E-02
 OM13
+       -2.89E-01 -4.46E-01 -6.40E-01 -4.22E-01 -1.33E-02  3.66E-01 -2.38E-01 -1.42E-01  2.11E-01  2.01E-02
 OM22
+       -1.47E-01 -3.58E-01 -4.75E-01 -4.64E-01  3.58E-02 -7.34E-04  1.66E-01  1.71E-01  8.20E-01  3.34E-01  3.13E-02
 OM23
+       -2.06E-01 -3.83E-01 -3.91E-01 -3.13E-01  2.33E-01 -7.08E-02 -3.70E-02  2.32E-01  3.98E-01  5.95E-01  1.69E-01  1.34E-02
 OM33
+       -2.27E-01  1.36E-01  3.33E-01  3.55E-01 -8.85E-02  1.61E-02 -1.82E-01 -7.39E-02 -3.10E-01 -1.50E-01 -3.86E-01 -1.12E-01
          1.62E-02
 SG11
+       -1.01E-01 -2.66E-01 -3.63E-01 -2.17E-01  3.56E-01  6.30E-02  1.96E-01 -7.96E-02 -5.66E-02  4.67E-02 -1.55E-02 -4.55E-02
         -1.91E-01  5.38E-03
 SG12
+       ......... ......... ......... ......... ......... ......... ......... ......... ......... ......... ......... .........
         ......... ......... .........
 SG22
+        3.30E-01  1.29E-01  1.66E-01  6.89E-02 -2.65E-01 -2.20E-01 -1.37E-01  9.33E-02  1.25E-01 -1.20E-01  4.37E-02  4.38E-02
         -1.61E-01 -5.07E-01 .........  6.76E-02
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
 ********************               FIRST ORDER CONDITIONAL ESTIMATION WITH INTERACTION              ********************
 ********************                      EIGENVALUES OF COR MATRIX OF ESTIMATE                     ********************

             1         2         3         4         5         6         7         8         9        10        11        12
             13        14        15
         2.92E-02  3.79E-02  1.08E-01  1.70E-01  2.17E-01  3.78E-01  4.26E-01  5.62E-01  8.30E-01  1.08E+00  1.24E+00  1.41E+00
          1.91E+00  2.45E+00  4.16E+00
 Elapsed finaloutput time in seconds:     0.03
 #CPUT: Total CPU Time in Seconds,        4.589
